x[1] := -4
x[2] := 4
Δx := 0.1
x := x[1], x[1] + Δx .. x[2]
f(x) := x^2 + x*sin(2*x) - (x - 5)*cos(x)
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x1 := root(f(x), x, -4, -2.5) = -2.97354
x2 := root(f(x), x, -2, -1.5) = -1.93283
f(x1) = 1.77636e-15
f(x2) = 0
