n := round(rnd(1)*9 + 1) = 4
f(x) := x^3 + (4 - n)*x^2 + (3 - 4*n)*x - 3*n
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V := [-3*n; 3 - 4*n; 4 - n; 1] = [-12; -13; 0; 1]
X := polyroots(V) = [-3; -1; 4]
f(X) = [-1.95399e-13; -1.91847e-13; -1.84741e-13]
