n := round(rnd(1)*9 + 1) = 1
A := [n, n + 1, n + 2; n - 3, n - 2, n; n - 1, n, n + 1] = [1, 2, 3; -2, -1, 1; 0, 1, 2]
B := [6*n + 8; 6*n - 7; 6*n + 2] = [14; -1; 8]
X1 := A^-1*B = [1; 2; 3]
A*X1 = [14; -1; 8]
X11 := lsolve(A, B) = [1; 2; 3]
x := X1[0]
y := X1[1]
z := X1[2]
Given
n*x + (n + 1)*y + (n + 2)*z == 6*n + 8
(n - 3)*x + (n - 2)*y + n*z == 6*n - 7
(n - 1)*x + n*y + (n + 1)*z == 6*n + 2
X2 := Find(x, y, z) = [1; 2; 3]
