x[1] := 0
x[2] := 10
Δx := 0.1
x := x[1], x[1] + Δx .. x[2]
f(x) := x*sin(x)
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x := 2
x1_max := Maximize(f, x) = 2.02876
y1_max := f(x1_max) = 1.81971
x := 5
x_min := Minimize(f, x) = 4.91318
y_min := f(x_min) = -4.81447
x := 8
x2_max := Maximize(f, x) = 7.97867
y2_max := f(x2_max) = 7.91673
