n := round(rnd(1)*9 + 1) = 6
Δx := 0.4
x1 := -2
x[n] := 2
x := x1, x1 + Δx .. x[n]
f(x) := (x^2 - n*x + sin(x))*sqrt(|x - cos(n*x)|)
f(x) = [25.4486; 8.75444; 10.3653; 4.44907; 1.2608; 0; -1.97362; -2.90593; -3.7136; -9.71117; -7.62422]
