n := round(rnd(1)*9 + 1) = 1
a := -3*n = -3
b := 3*n = 3
A := [round(rnd(1)*(a - b) + a); round(rnd(1)*(a - b) + a); round(rnd(1)*(a - b) + a)] = [-4; -7; -5]
B := [round(rnd(1)*(a - b) + a); round(rnd(1)*(a - b) + a); round(rnd(1)*(a - b) + a)] = [-8; -4; -7]
C := [round(rnd(1)*(a - b) + a); round(rnd(1)*(a - b) + a); round(rnd(1)*(a - b) + a)] = [-5; -4; -4]
# Скалярное произведение с использованием шаблонов | Скалярное произведение без использования шаблонов
S2 := A[0]*B[0] + A[1]*B[1] + A[2]*B[2] = 95
S1 := A*B = 95
# Векторное произведение с использованием шаблонов | Векторное произведение без использования шаблонов
V1 := B×C = [-12; 3; 12]
V2 := [B[1]*C[2] - B[2]*C[1]; B[2]*C[0] - B[0]*C[2]; B[0]*C[1] - B[1]*C[0]] = [-12; 3; 12]
# Смешанное произведение с использованием шаблонов | Смешанное произведение без использования шаблонов
W1 := (A×B)*C = -33
W2_tmp := [A[1]*B[2] - A[2]*B[1]; A[2]*B[0] - A[0]*B[2]; A[0]*B[1] - A[1]*B[0]] = [29; 12; -40]
W2 := W2_tmp[0]*C[0] + W2_tmp[1]*C[1] + W2_tmp[2]*C[2] = -33
lenA := ||A|| = 9.48683
lenB := ||B|| = 11.3578
lenC := ||C|| = 7.54983
result := if(lenA > lenB, "Это A", if(lenB > lenC, "Это B", "Это C")) = "Это B"
N := 10
i := 0 .. N - 1
j := 0 .. N - 1
M[i, j] := round(-10 + 20*rnd(1))
M = [
    9, 8, -5, -2, 3, -1, 2, 7, 2, 1;
    -6, 1, -5, 2, 2, 0, 5, 2, 6, 2;
    8, 5, 3, -4, -4, -8, 7, -7, -8, 3;
    1, -2, -1, -7, 5, 7, 7, -4, -7, 6;
    2, -9, 3, -8, -5, 8, 3, 0, 0, 0;
    4, 2, -10, -8, 7, 5, -2, 1, 9, -6;
    -7, 9, -9, -9, -7, 7, 4, -10, 4, -6;
    -7, -3, -3, 6, 1, 6, -7, -2, -7, -9;
    1, 1, -4, 6, -4, 8, 5, -3, -5, -5;
    1, -9, 0, -8, 8, -7, 9, -9, -3, -2
]
sum := sum(sum(M[i, j], j = 0 .. N - 1), i = 0 .. N - 1) = -40
sumPositive := sum(sum(if(M[i, j] > 0, M[i, j], 0), j = 0 .. N - 1), i = 0 .. N - 1) = 224
sumNegative := sum(sum(if(M[i, j] < 0, M[i, j], 0), j = 0 .. N - 1), i = 0 .. N - 1) = -264
X := M[:, 0] = [9; -6; 8; 1; 2; 4; -7; -7; 1; 1]
Y := transpose(M)[:, N - 1] = [1; -9; 0; -8; 8; -7; 9; -9; -3; -2]
P := X*Y = 38
