x[1] := -2*π
x[2] := 2*π
Δx := π/4
x := x[1], x[1] + Δx .. x[2] = [-6.28319; -5.49779; -4.71239; -3.92699; -3.14159; -2.35619; -1.5708; -0.785398; 0; 0.785398; 1.5708; 2.35619; 3.14159; 3.92699; 4.71239; 5.49779; 6.28319]
X := x
g(x) := sqrt(|x|)*sin(x)
Y := g(x)
g(x) = [0; 2.8164; 3.983; 2.8164; 0; -2.8164; -3.983; -2.8164; 0; 2.8164; 3.983; 2.8164; 0; -2.8164; -3.983; -2.8164; 0]
WRITEPRN("X.txt") := X
WRITEPRN("Y.txt") := Y
YY := READPRN("Y.txt") = [0; 2.816; 3.983; 2.816; 0; -2.816; -3.983; -2.816; 0; 2.816; 3.983; 2.816; 0; -2.816; -3.983; -2.816; 0]
XX := READPRN("X.txt") = [-6.283; -5.498; -4.712; -3.927; -3.142; -2.356; -1.571; -0.7854; 0; 0.7854; 1.571; 2.356; 3.142; 3.927; 4.712; 5.498; 6.283]
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